Simulations: Version=54
  Memo Title page
    This project's aim was to investigate the phenotypical traits and trade-offs associated with water use in potato crops. The experiment was conducted in the rain-shelter facility at Lincoln site using 3 different potato cultivars ('Russet Burbank', 'Moonlight' and 'Karaka') grown under 2 irrigation regimes (fully irrigated (no water stress) or severe drought (severe water stress)).
  DataStore
  Experiment LincolnRS2018
    Memo Trial details
      Three different potato cultivars
       Russet Burbank
       Moonlight
       Karaka
      2 irrigation regimes (fully irrigated (no water stress) or severe drought (severe water stress)).
    Factors
      Factor Irr
        Factor Full
          Specifications:
            [Irrig]
            [StateFactors].Script.IrrFactor = true
          Operations Full
            2018-10-02  [Irrigation].Apply(15);
            2018-11-04  [Irrigation].Apply(19.7);
            2018-11-13  [Irrigation].Apply(16.0);
            2018-11-19  [Irrigation].Apply(20.0);
            2018-11-26  [Irrigation].Apply(31.5);
            2018-12-03  [Irrigation].Apply(25);
            2018-12-10  [Irrigation].Apply(40);
            2018-12-18  [Irrigation].Apply(25);
            2018-12-24  [Irrigation].Apply(31.3);
            2018-12-30  [Irrigation].Apply(35.2);
            2019-01-07  [Irrigation].Apply(52.8);
            2019-01-08  [Irrigation].Apply(10);
            2019-01-14  [Irrigation].Apply(50.0);
            2019-01-21  [Irrigation].Apply(40);
            2019-01-28  [Irrigation].Apply(48.1);
            2019-02-04  [Irrigation].Apply(50.0);
            2019-02-11  [Irrigation].Apply(45.0);
            2019-02-19  [Irrigation].Apply(40.0);
            Memo
              Have added an extra irrigation, on 22 Oct,

              Data indcates water applied but no notes of it RFZ

              In Statefactors have donethe irrigations for
                17/12  21/1 19/11 14/1
        Factor Nil
          Specifications:
            [Irrig]
            [StateFactors].Script.IrrFactor = false
          Operations Nil
            2018-10-02  [Irrigation].Apply(15);
            2018-11-04  [Irrigation].Apply(19.7);
            2018-11-19  [Irrigation].Apply(10);
            2018-12-18  [Irrigation].Apply(21.8);
            2019-01-08  [Irrigation].Apply(11);
            2019-01-14  [Irrigation].Apply(25);
            2019-01-28  [Irrigation].Apply(28.5);
            Memo
              Have added an extra irrigation, on 3 Nov,

              Data indcates water applied but no notes of it RFZ
      Factor Cult
        Specifications=[Planting].Script.CropToSow = RussetBurbank,MoonLight,Karaka
    Simulation Rainshelter
      Clock: StartDate=2018-09-28; EndDate=2019-03-01
      Summary summaryfile
      Weather: FileName=lincoln.met
      SoilArbitrator Soil Arbitrator
      Zone paddock: Area=1; Slope=0
        Folder Manager folder
          Operations GeneralIrrigation
            2016-09-02  [Irrigation].Apply(25.0);
            2016-10-25  [Irrigation].Apply(5.0);
            2016-10-28  [Irrigation].Apply(5.0);
          Operations Irrig
          Operations Fert
            2018-09-27  [Fertiliser].Apply(700, Fertiliser.Types.DAP, 10);
            2018-11-19  [Fertiliser].Apply(75, Fertiliser.Types.UreaN, 10);
            2018-12-18  [Fertiliser].Apply(75, Fertiliser.Types.UreaN, 10);
            2019-01-08  [Fertiliser].Apply(75, Fertiliser.Types.UreaN, 10);
          Manager ClimateControl
            StartDate = 2018-10-17
            EndDate = 2019-04-01
```csharp
using System;
using Models.Core;
using APSIM.Shared.Utilities;



using System.Collections.Generic;
using System.Text;
using Models.PMF;
using Models;
using System.Xml.Serialization;

namespace Models
{
    [Serializable] 
    [System.Xml.Serialization.XmlInclude(typeof(Model))]
    public class Script : Model
    {
        [Link] Weather Met;
        [Link] Clock Clock;
    
        [Description("Start Date")]
        public DateTime StartDate { get; set; }
        
        [Description("End Date")]
        public DateTime EndDate { get; set; }
 
    
        [EventSubscribe("PreparingNewWeatherData")]
        private void OnPreparingNewWeatherData(object sender, EventArgs e)
        {
            if ((Clock.Today.Date >= StartDate) && (Clock.Today.Date <= EndDate))
                Met.Rain = 0;        
        }
    }
}
```
          Manager StateFactors
            IrrFactor = False
            NitFactor = 0
```csharp
using System;
using Models.Core;
using System.Collections.Generic;
using System.Text;
using Models.Soils;
using Models.PMF;
using Models;
using System.Xml.Serialization;
using APSIM.Shared.Utilities;

namespace Models
{
    [Serializable] 
    public class Script : Model
    {
        [Link] Clock Clock;
        [Link] Irrigation Irrigation;
        [Link] Fertiliser Fert;
        [Link] Soil ThisSoil;
        [Description("Amount of Irrgation be applied 0/1")]
        public bool IrrFactor { get; set; }
        [Description("Amount of fertiliser to be applied (kg/ha)")]
        public double NitFactor { get; set; }
        
          
        private void SetSoilLayers()
        {
            /*
            Not used yrt use whenmore detailed info is known
            */
            int i = 0;
            if ((IrrFactor == false) && (NitFactor == 0))
            {
                if (ThisSoil.Thickness.Length != 7)
                {
                    throw new Exception("Soil layer exception");
                }
             
                ThisSoil.LL15[0] = 0.06;
                ThisSoil.LL15[1] = 0.06;
                ThisSoil.LL15[2] = 0.08;
                ThisSoil.LL15[3] = 0.14;
                ThisSoil.LL15[4] = 0.16;
                ThisSoil.LL15[5] = 0.16;
                ThisSoil.LL15[6] = 0.11;
                ThisSoil.DUL[0] = 0.34;
                ThisSoil.DUL[1] = 0.3;
                ThisSoil.DUL[2] = 0.28;
                ThisSoil.DUL[3] = 0.3;
                ThisSoil.DUL[4] = 0.3;
                ThisSoil.DUL[5] = 0.30;
                ThisSoil.DUL[6] = 0.3;
                ThisSoil.SAT[0] = 0.4;
                ThisSoil.SAT[1] = 0.4;
                ThisSoil.SAT[2] = 0.4;
                ThisSoil.SAT[3] = 0.4;
                ThisSoil.SAT[4] = 0.4;
                ThisSoil.SAT[5] = 0.4;
                ThisSoil.SAT[6] = 0.4;
                ThisSoil.SoilWater.Reset();
            }   
            if ((IrrFactor == false) && (NitFactor == 50))
            {
                if (ThisSoil.Thickness.Length != 7)
                {
                    throw new Exception("Soil layer exception");
                }
             
                ThisSoil.LL15[0] = 0.07;
                ThisSoil.LL15[1] = 0.12;
                ThisSoil.LL15[2] = 0.17;
                ThisSoil.LL15[3] = 0.20;
                ThisSoil.LL15[4] = 0.26;
                ThisSoil.LL15[5] = 0.32;
                ThisSoil.LL15[6] = 0.30;
                ThisSoil.DUL[0] = 0.30;
                ThisSoil.DUL[1] = 0.26;
                ThisSoil.DUL[2] = 0.29;
                ThisSoil.DUL[3] = 0.25;
                ThisSoil.DUL[4] = 0.29;
                ThisSoil.DUL[5] = 0.34;
                ThisSoil.DUL[6] = 0.30;
                ThisSoil.SAT[0] = 0.34;
                ThisSoil.SAT[1] = 0.34;
                ThisSoil.SAT[2] = 0.34;
                ThisSoil.SAT[3] = 0.34;
                ThisSoil.SAT[4] = 0.34;
                ThisSoil.SAT[5] = 0.34;
                ThisSoil.SAT[6] = 0.34;
                ThisSoil.SoilWater.Reset();
            }   
            if ((IrrFactor == false) && (NitFactor == 50))
            {
                if (ThisSoil.Thickness.Length != 7)
                {
                    throw new Exception("Soil layer exception");
                }
             
                ThisSoil.LL15[0] = 0.06;
                ThisSoil.LL15[1] = 0.11;
                ThisSoil.LL15[2] = 0.21;
                ThisSoil.LL15[3] = 0.18;
                ThisSoil.LL15[4] = 0.23;
                ThisSoil.LL15[5] = 0.30;
                ThisSoil.LL15[6] = 0.26;
                ThisSoil.DUL[0] = 0.25;
                ThisSoil.DUL[1] = 0.26;
                ThisSoil.DUL[2] = 0.30;
                ThisSoil.DUL[3] = 0.27;
                ThisSoil.DUL[4] = 0.34;
                ThisSoil.DUL[5] = 0.27;
                ThisSoil.DUL[6] = 0.30;
                ThisSoil.SAT[0] = 0.34;
                ThisSoil.SAT[1] = 0.34;
                ThisSoil.SAT[2] = 0.34;
                ThisSoil.SAT[3] = 0.34;
                ThisSoil.SAT[4] = 0.34;
                ThisSoil.SAT[5] = 0.34;
                ThisSoil.SAT[6] = 0.34;
                ThisSoil.SoilWater.Reset();
            }   
            if ((IrrFactor == true) && (NitFactor == 0))
            {
                if (ThisSoil.Thickness.Length != 7)
                {
                    throw new Exception("Soil layer exception");
                }
             
                ThisSoil.LL15[0] = 0.13;
                ThisSoil.LL15[1] = 0.21;
                ThisSoil.LL15[2] = 0.25;
                ThisSoil.LL15[3] = 0.19;
                ThisSoil.LL15[4] = 0.29;
                ThisSoil.LL15[5] = 0.32;
                ThisSoil.LL15[6] = 0.34;
                ThisSoil.DUL[0] = 0.31;
                ThisSoil.DUL[1] = 0.28;
                ThisSoil.DUL[2] = 0.30;
                ThisSoil.DUL[3] = 0.28;
                ThisSoil.DUL[4] = 0.29;
                ThisSoil.DUL[5] = 0.34;
                ThisSoil.DUL[6] = 0.30;
                ThisSoil.SAT[0] = 0.34;
                ThisSoil.SAT[1] = 0.34;
                ThisSoil.SAT[2] = 0.34;
                ThisSoil.SAT[3] = 0.34;
                ThisSoil.SAT[4] = 0.34;
                ThisSoil.SAT[5] = 0.34;
                ThisSoil.SAT[6] = 0.34;
                ThisSoil.SoilWater.Reset();
            }   
            if ((IrrFactor == true) && (NitFactor == 50))
            {
                if (ThisSoil.Thickness.Length != 7)
                {
                    throw new Exception("Soil layer exception");
                }
             
                ThisSoil.LL15[0] = 0.14;
                ThisSoil.LL15[1] = 0.21;
                ThisSoil.LL15[2] = 0.27;
                ThisSoil.LL15[3] = 0.27;
                ThisSoil.LL15[4] = 0.27;
                ThisSoil.LL15[5] = 0.32;
                ThisSoil.LL15[6] = 0.30;
                ThisSoil.DUL[0] = 0.31;
                ThisSoil.DUL[1] = 0.28;
                ThisSoil.DUL[2] = 0.30;
                ThisSoil.DUL[3] = 0.28;
                ThisSoil.DUL[4] = 0.29;
                ThisSoil.DUL[5] = 0.34;
                ThisSoil.DUL[6] = 0.30;
                ThisSoil.SAT[0] = 0.34;
                ThisSoil.SAT[1] = 0.34;
                ThisSoil.SAT[2] = 0.34;
                ThisSoil.SAT[3] = 0.34;
                ThisSoil.SAT[4] = 0.34;
                ThisSoil.SAT[5] = 0.34;
                ThisSoil.SAT[6] = 0.34;
                ThisSoil.SoilWater.Reset();
            }
            if ((IrrFactor == true) && (NitFactor == 250))
            {
                if (ThisSoil.Thickness.Length != 7)
                {
                    throw new Exception("Soil layer exception");
                }
             
                ThisSoil.LL15[0] = 0.12;
                ThisSoil.LL15[1] = 0.18;
                ThisSoil.LL15[2] = 0.17;
                ThisSoil.LL15[3] = 0.20;
                ThisSoil.LL15[4] = 0.27;
                ThisSoil.LL15[5] = 0.27;
                ThisSoil.LL15[6] = 0.21;
                ThisSoil.DUL[0] = 0.31;
                ThisSoil.DUL[1] = 0.28;
                ThisSoil.DUL[2] = 0.30;
                ThisSoil.DUL[3] = 0.28;
                ThisSoil.DUL[4] = 0.29;
                ThisSoil.DUL[5] = 0.34;
                ThisSoil.DUL[6] = 0.30;
                ThisSoil.SAT[0] = 0.34;
                ThisSoil.SAT[1] = 0.34;
                ThisSoil.SAT[2] = 0.34;
                ThisSoil.SAT[3] = 0.34;
                ThisSoil.SAT[4] = 0.34;
                ThisSoil.SAT[5] = 0.34;
                ThisSoil.SAT[6] = 0.34;
                ThisSoil.SoilWater.Reset();
            }
        }

        [EventSubscribe("Commencing")]
        private void OnSimulationCommencing(object sender, EventArgs e)
        {
            //    SetSoilLayers();
        }
        
        [EventSubscribe("DoManagement")]
        private void OnDoManagement(object sender, EventArgs e)
        {
            //Specific irrgations
            
            //Potato
            
            if ((IrrFactor == true) && (NitFactor == 300))
            {
                if ((DateUtilities.CompareDates("1-Feb", Clock.Today) == 0))
                    Irrigation.Apply(40);
                if ((DateUtilities.CompareDates("1-Mar", Clock.Today) == 0))
                    Irrigation.Apply(36);
            }
        
            //Oats
            if (Clock.Today.Year == 2017)
            if ((DateUtilities.CompareDates("5-Jul", Clock.Today) == 0))
            if (IrrFactor == true)
            {
                if (NitFactor == 0)
                    Fert.Apply(40, Models.Fertiliser.Types.NO3N, 10);
                if (NitFactor == 50)
                    Fert.Apply(85, Models.Fertiliser.Types.NO3N, 10);
                if (NitFactor == 300)
                    Fert.Apply(270, Models.Fertiliser.Types.NO3N, 10);
               
            }
             
            
            
        }
    }
        
        
}
```
          Manager Planting
            InitialRootDepth = 5
            CropToSow = RussetBurbank
            SowingDate = 2018-10-02
```csharp
using System;
using Models.Core;
using System.Collections.Generic;
using System.Text;
using Models.PMF;
using Models;
using System.Xml.Serialization;
using APSIM.Shared.Utilities;
using System.Data;
using Models.PMF.Interfaces;
using Models.Surface;

namespace Models
{
    [Serializable] 
    //[System.Xml.Serialization.XmlInclude(typeof(Model))]
    public class Script : Model
    {
        [Link] Plant Potato;
        [Link] Clock Clock;
        [Link] Zone zone;
        [Link] Simulation Simulation;
        [Link] SurfaceOrganicMatter SurfOM;
        
                
        [Description("Initial Root Depth")]
        public double InitialRootDepth { get; set; }
        [Description("Sown Crop")]
         [Display(Type=DisplayType.CultivarName)]
         public string CropToSow { get; set; }
        [Description("Sowing Date")]
        public DateTime SowingDate { get; set; }
        //[Description("Sowing Date2")]
        //public DateTime SowingDate2 { get; set; }
        //[Description("Sowing Date3")]
        //public DateTime SowingDate3 { get; set; }
        //[Description("Sowing Date4")]
        //public DateTime SowingDate4 { get; set; }
        
        
        [EventSubscribe("DoManagement")]
        private void OnDoManagement(object sender, EventArgs e)
        {
            if (Clock.Today.Date == SowingDate)
            {
                Potato.Sow(cultivar: CropToSow, population: 9, depth: InitialRootDepth, rowSpacing: 500);
                
            }
            //else if (Clock.Today.Date == SowingDate2)
            {
                //    Potato.Sow(cultivar: CropToSow, population: 9, depth: InitialRootDepth, rowSpacing: 500);
            }
            //else if (Clock.Today.Date == SowingDate3)
            {
                //    Potato.Sow(cultivar: CropToSow, population: 9, depth: InitialRootDepth, rowSpacing: 500);
            }
            //else if (Clock.Today.Date == SowingDate4)
            {
                //    Potato.Sow(cultivar: CropToSow, population: 9, depth: InitialRootDepth, rowSpacing: 500);
        
            }
            
            
        }
    }
}
```
          Plant Potato: CropType=Potato; IsEnding=false; DaysAfterEnding=0
        MicroClimate: a_interception=0; b_interception=1; c_interception=0; d_interception=0; soil_albedo=0.3; SoilHeatFluxFraction=0.4; NightInterceptionFraction=0.5; ReferenceHeight=2
        Irrigation
        Fertiliser
        SurfaceOrganicMatter Surface Organic Matter: InitialResidueName=wheat_stubble; InitialResidueType=wheat; InitialResidueMass=1500; InitialStandingFraction=0; InitialCPR=0; InitialCNR=80; FractionFaecesAdded=0.5
        Soil: SoilType=NZ_sedementary; Region=Plains; State=Canterbury; Country=New Zealnd; Latitude=0; Longitude=0
          Analysis: Thickness=[100, 200, 300, 300, 300, 300]; PH=[6.6, 6.2, 5.7, 5.5, 5.5, 5.5]; PHUnits=Water; BoronUnits=0
          Water
            Thickness  BD     AirDry  LL15  DUL   SAT    KS
            150        1      0.05    0.08  0.32  0.35   4832.039
            150        1.32   0.1     0.08  0.32  0.35   389.229
            300        1.35   0.149   0.08  0.32  0.342  16.362
            300        1.3    0.14    0.08  0.28  0.322  97.995
            300        1.3    0.15    0.08  0.28  0.348  97.995
            300        1.3    0.149   0.08  0.28  0.342  97.995
            300        1.3    0.1     0.08  0.28  0.307  97.995
            200        1.601  0.06    0.08  0.22  0.309  97.995
            SoilCrop PotatoSoil: LL=[0.13, 0.13, 0.1, 0.15, 0.3, 0.3, 0.3, 0.3]; KL=[0.1, 0.06, 0.04, 0.01, 0, 0, 0, 0]; XF=[1, 1, 1, 1, 0, 0, 0, 0]
          SoilWater: SummerDate=1-Nov; SummerU=6; SummerCona=2; WinterDate=1-Apr; WinterU=9; WinterCona=4.4; DiffusConst=0; DiffusSlope=0; Salb=0.18; CN2Bare=68; CNRed=20; CNCov=0.8; slope=0; discharge_width=0; catchment_area=0; max_pond=0; ResidueInterception=0
            Thickness  SWCON  KLAT
            200        0.7    0
            200        0.7    0
            200        0.95   0
            200        0.95   0
            200        0.95   0
            200        0.95   0
            200        0.95   0
            200        0.95   0
          SoilNitrogen: fom_types=[default, manure, mucuna, lablab, shemp, stable]; fract_carb=[0.2, 0.3, 0.54, 0.57, 0.45, 0]; fract_cell=[0.7, 0.3, 0.37, 0.37, 0.47, 0.1]; fract_lign=[0.1, 0.4, 0.09, 0.06, 0.08, 0.9]
            SoilNitrogenNO3 NO3
            SoilNitrogenNH4 NH4
            SoilNitrogenUrea Urea
            SoilNitrogenPlantAvailableNO3 PlantAvailableNO3
            SoilNitrogenPlantAvailableNH4 PlantAvailableNH4
          SoilOrganicMatter: RootCN=40; SoilCN=11; EnrACoeff=7.4; EnrBCoeff=0.2; OCUnits=Total
            Thickness  OC     FBiom  FInert  RootWt
            180        3      0.06   0.437   427.528
            150        1.247  0.04   0.657   316.72
            400        0.316  0.012  0.85    142.312
            270        0.208  0.01   0.945   82.9318
            500        0.2    0.01   0.983   30.5089
          Sample Initial Soil Settings: NO3Units=kg/ha; NH4Units=kg/ha; SWUnits=Volumetric; OCUnits=Total; PHUnits=Water
            Thickness  NO3  NH4  SW
            200        18   32   0.3
            200        3    17   0.28
            200        5    6    0.24
            200        2    5    0.24
            200        2    5    0.28
            200        2    5    0.28
            200        3    5    0.28
            200        3    5    0.22
          CERESSoilTemperature
        Report EnviroReport: EventNames=[Clock].DoReport
          VariableNames:
            [Clock].Today
            [Weather].MeanT
            [Weather].Radn
            [Weather].Rain
            [Irrigation].IrrigationApplied
            [Potato].Leaf.Fw
            [MicroClimate].interception as Interception
            [Soil].SoilWater.Es as Evaporation
            [Soil].SoilWater.Drainage as Drainage
            [Soil].SoilWater.Runoff as Runoff
            sum([Soil].SoilWater.SWmm) as TotalSoilWater
            sum([Soil].SoilNitrogen.MineralisedN) as MineralisedN
            [Fertiliser].NitrogenApplied as FertiliserN
            sum([Soil].SoilNitrogen.Denitrification) as DenitrifiedN
            ([Soil].SoilWater.LeachUrea+[Soil].SoilWater.LeachNH4+[Soil].SoilWater.LeachNO3) as NLeached
            [SurfaceOrganicMatter].N as TotalSurfOMN
            sum([Soil].SoilNitrogen.FOMN) as TotalFOMN
            sum([Soil].SoilNitrogen.MicrobialN) as TotalMicrobialN
            sum([Soil].SoilNitrogen.HumicN) as TotalHumicN
            (sum([Soil].SoilNitrogen.NH4.kgha) + sum([Soil].SoilNitrogen.NO3.kgha)) as TotalSoilN
            sum([Soil].SoilNitrogen.Urea.kgha) as TotalUrea
            sum([Soil].SoilNitrogen.NH4.kgha) as TotalNH4
            sum([Soil].SoilNitrogen.NO3.kgha) as TotalNO3
        Report: EventNames=[Clock].DoReport
          VariableNames:
            [Clock].Today
            [Weather].MeanT
            [Soil].SoilWater.SW
            [Soil].SoilWater.SWmm
            sum([Soil].SoilWater.SWmm) as ProfileWater
            [Potato].AboveGround.N
            [Potato].AboveGround.Wt
            [Potato].AboveGroundLive.N
            [Potato].AboveGroundLive.Wt
            [Potato].AboveGroundDead.N
            [Potato].AboveGroundDead.Wt
            [Potato].Arbitrator.DMDemand
            [Potato].Arbitrator.DM.TotalFixationSupply
            [Potato].Leaf.AppearedCohortNo
            [Potato].Leaf.CoverDead
            [Potato].Leaf.CoverGreen
            [Potato].Leaf.CoverTotal
            [Potato].Leaf.Dead.N
            [Potato].Leaf.Dead.NConc
            [Potato].Leaf.Dead.Wt
            [Potato].Leaf.DeadCohortNo
            [Potato].Leaf.SenescingCohortNo
            [Potato].Leaf.ExpandedCohortNo
            [Potato].Leaf.Fn
            [Potato].Leaf.Fw
            [Potato].Leaf.Height
            [Potato].Leaf.InitialisedCohortNo
            [Potato].Leaf.LAI
            [Potato].Leaf.Live.N
            [Potato].Leaf.Live.NConc
            [Potato].Leaf.Live.Wt
            [Potato].Leaf.SpecificArea
            [Potato].Leaf.Transpiration
            [Potato].Phenology.CurrentPhaseName
            [Potato].Phenology.CurrentStageName
            [Potato].Phenology.DailyVernalisation.Value()
            [Potato].Phenology.Photoperiod.Value()
            [Potato].Phenology.Stage
            [Potato].Phenology.ThermalTime.Value()
            [Potato].Phenology.ThermalTime.Value()
            [Potato].Phenology.Vrn1.Value()
            [Potato].Phenology.Vrn2.Value()
            [Potato].Phenology.Vrn4.Value()
            [Potato].Phenology.Zadok.Stage
            [Potato].Root.Depth
            [Potato].Root.N
            [Potato].Root.Wt
            [Potato].Root.Nconc
            [Potato].Root.WaterUptake
            [Potato].Tuber.N
            [Potato].Tuber.NConc
            [Potato].Tuber.Wt
            [Potato].Tuber.Live.StorageWt
            [Potato].Petiole.N
            [Potato].Petiole.NConc
            [Potato].Petiole.Wt
            [Potato].Petiole.PercentWSC
            [Potato].Petiole.Live.StorageWt
            [Potato].SowingData.Cultivar
            [Potato].Structure.Height
            [Potato].Structure.LeafTipsAppeared
            [Potato].Leaf.PlantAppearedGreenLeafNo
            [Potato].Structure.MainStemPopn
            [Potato].Structure.TotalStemPopn
            [Potato].Total.N
            [Potato].Total.Wt
            [SurfaceOrganicMatter].Wt
            sum([Soil].SoilNitrogen.NO3.kgha) as TotalSoilNitrogen
            [Potato].Phenology.FlagLeafDAS
            [Potato].Phenology.FloweringDAS
            [Potato].Phenology.MaturityDAS
            [Potato].Phenology.PhotoPeriod
            [Potato].Phenology.PhotoPeriodDeltaFunction
            [Potato].Phenology.Stage
            [Potato].Phenology.SoilTemperatureFunction.Value()
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